*Heading
** Job name: Polymerizacion_1 Model name: Model-1
** Generated by: Abaqus/CAE 6.14-1
*Preprint, echo=NO, model=NO, history=NO, contact=NO
**
** PARTS
**
*Part, name=cell
*Node
*INCLUDE, input=mesh.inp
*Orientation, name=Ori-1
1., 0., 0., 0., 1., 0.
3, 0.
** Section: cel_ortotropic
*Solid Section, elset=GActinSource, orientation=Ori-1, material=mat_cyto_orto
1.,
** Section: cel_ortotropic
*Solid Section, elset=all_orto, orientation=Ori-1, material=mat_cyto_orto
1.,
** Section: cel_isotropic
*Solid Section, elset=AdherentActin, orientation=Ori-1, material=mat_cyto_orto_adherent
1.,
** Section: cel_ortotropic
*Solid Section, elset=nonGActin, orientation=Ori-1, material=mat_cyto_orto
1.,
** Section: cel_isotropic
*Solid Section, elset=Myosin, orientation=Ori-1, material=mat_cyto_iso
1.,
** Section: cel_isotropic
*Solid Section, elset=all_iso, orientation=Ori-1, material=mat_cyto_iso
1.,
** Section: cel_ortotropic
*Solid Section, elset=FreeActin, orientation=Ori-1, material=mat_cyto_orto_front
1.,
** Section: Nucleus
*Solid Section, elset=Nucleus, orientation=Ori-1, material=mat_Nucleus
1.,
** Section: cel_isotropo
*Solid Section, elset=all_iso_1, orientation=Ori-1, material= mat_cyto_iso
,
*End Part
**
*Part, name=tube
*Node
      1,   5.98000002,         120.
      2,   5.98000002,   119.699997
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*Element, type=RAX2
  1,   1,   2
  2,   2,   3
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*Node
    402,   5.98000002,           0.,           0.
*Nset, nset=tube-RefPt_, internal
402,
*Nset, nset=Master, generate
   1,  402,    1
*Elset, elset=Master, generate
   1,  400,    1
*Elset, elset=_Master_surface_SPOS, internal, generate
  1,  400,   1
*Surface, type=ELEMENT, name=Master_surface
_Master_surface_SPOS, SNEG
*Elset, elset=tube, generate
  1,  400,   1
*End Part
**
**
** ASSEMBLY
**
*Assembly, name=Assembly
**
*Instance, name=Cell-1, part=cell
*End Instance
**
*Instance, name=tube, part=tube
*End Instance
**
*Nset, nset=rp, instance=tube
 402,
*Rigid Body, ref node=tube.tube-RefPt_, elset=tube.tube
*End Assembly
**
** MATERIALS
**
*Material, name=mat_cyto_iso
*Elastic
 0.8, 0.38
*Expansion
0.3,
*Material, name=mat_cyto_orto
*Elastic
 0.8, 0.38
*Expansion, type=ORTHO
0.,0.3,0.
*Material, name=mat_cyto_orto_adherent
*Elastic
 0.8, 0.38
*Expansion, type=ORTHO
0.3,0.,0.
*Material, name=mat_cyto_orto_front
*Elastic
 0.8, 0.38
*Expansion, type=ORTHO
0.,0.3,0.
*Material, name=mat_Nucleus
*Elastic
8., 0.38
*Expansion
0.0,
**
** INTERACTION PROPERTIES
**
*Surface Interaction, name=contact
1.,
*Friction, slip tolerance=0.005
 0.5,
**
** BOUNDARY CONDITIONS
**
** Name: encastre Type: Symmetry/Antisymmetry/Encastre
*Boundary
rp, ENCASTRE
**
** INTERACTIONS
**
** Interaction: contact
*Contact Pair, interaction=contact, type=SURFACE TO SURFACE
Cell-1.exterior_surface, tube.Master_surface
** Interaction: self_contact
*Contact Pair, interaction=contact, type=SURFACE TO SURFACE
Cell-1.exterior_surface,
** ----------------------------------------------------------------
**
** STEP: Step-1
**
*Step, name=Step-1, nlgeom=YES
*Static
0.1, 1., 1e-05, 1.
**
** PREDEFINED FIELDS
**
** Name: Frente   Type: Temperature
*Temperature
*INCLUDE, input=temp.inp
** Name: Nucleus_zero   Type: Temperature
*Temperature
Cell-1.Nucleus, 0
** Name: Depolymerization   Type: Temperature
*Temperature
Cell-1.GActinRounded, -1.75
** Name: Depolymerization2   Type: Temperature
*Temperature
Cell-1.nonGActin, -2
** Name: Adherent   Type: Temperature
*Temperature
Cell-1.AdherentActin, 2
** Name: all_iso   Type: Temperature
*Temperature
Cell-1.all_iso, 0
** Name: Myosin   Type: Temperature
*Temperature
*INCLUDE, input=tempMyosin.inp
**
** OUTPUT REQUESTS
**
*Restart, write, frequency=0
**
** FIELD OUTPUT: F-Output-1
**
*Output, field, frequency=1
*Node Output
NT, U
*Element Output, directions=YES
E, MISES, S
*Contact Output
CSTRESS,
*Output, history, frequency=99999
*NODE PRINT, nset=Cell-1.Contorno, frequency=999
COORD
*NODE PRINT, nset=Cell-1.ContornoNucleus, frequency=999
COORD
*NODE PRINT, nset=Cell-1.todo, frequency=999
COORD
**
*End Step
